New Capacitor.uc63 bus1=p1umv20 phases=3 Kv=12.47 conn=Wye Kvar=450.0

New CapControl.uc63 Capacitor=uc63 Element=Line.padswitch(r:p1umv20-udt3654)u_75384 Terminal=1 delay=100.0 Type=voltage Vmin=120.5 Vmax=125.0 Ptratio=59.99631547328862 Ctratio=100.0
