New Capacitor.uc66 bus1=udt17221 phases=3 Kv=12.47 conn=Wye Kvar=300.0

New CapControl.uc66 Capacitor=uc66 Element=Line.padswitch(r:udt15965-udt17221)u_75661 Terminal=1 delay=100.0 Type=voltage Vmin=120.5 Vmax=125.0 Ptratio=59.99631547328862 Ctratio=100.0
