New Capacitor.uc72 bus1=udt13683 phases=3 Kv=12.47 conn=Wye Kvar=450.0

New CapControl.uc72 Capacitor=uc72 Element=Line.l(r:udt12056-udt13683) Terminal=1 delay=100.0 Type=voltage Vmin=120.5 Vmax=125.0 Ptratio=59.99631547328862 Ctratio=100.0
