New Capacitor.uc77 bus1=udt3443 phases=3 Kv=12.47 conn=Wye Kvar=300.0

New CapControl.uc77 Capacitor=uc77 Element=Line.padswitch(r:udt18240-udt3443)u_78250 Terminal=1 delay=100.0 Type=voltage Vmin=120.5 Vmax=125.0 Ptratio=59.99631547328862 Ctratio=100.0
