New Capacitor.uc83 bus1=udt10386 phases=3 Kv=12.47 conn=Wye Kvar=300.0

New CapControl.uc83 Capacitor=uc83 Element=Line.padswitch(r:udt10386-udt10658)u_79669 Terminal=1 delay=100.0 Type=voltage Vmin=120.5 Vmax=125.0 Ptratio=59.99631547328862 Ctratio=100.0
