New Capacitor.uc88 bus1=udt18050 phases=3 Kv=12.47 conn=Wye Kvar=300.0

New CapControl.uc88 Capacitor=uc88 Element=Line.l(r:udt18050-udt6915) Terminal=1 delay=100.0 Type=voltage Vmin=120.5 Vmax=125.0 Ptratio=59.99631547328862 Ctratio=100.0
