New Storage.storage_p1ulv51387 phases=1 bus1=p1ulv51387.1.2 kV=0.24 kVA=8.8 kWRated=8.0 kWhRated=16.0 kWhStored=8.0 State=IDLING %EffCharge=95.0 %EffDischarge=95.0
New Storage.storage_p1ulv43220 phases=1 bus1=p1ulv43220.1.2 kV=0.24 kVA=8.8 kWRated=8.0 kWhRated=16.0 kWhStored=8.0 State=IDLING %EffCharge=95.0 %EffDischarge=95.0
