New Capacitor.uc12 bus1=udt3641 phases=3 Kv=12.47 conn=Wye Kvar=300.0

New CapControl.uc12 Capacitor=uc12 Element=Line.l(r:udt3641-udt8219) Terminal=1 delay=100.0 Type=voltage Vmin=120.5 Vmax=125.0 Ptratio=59.99631547328862 Ctratio=100.0
