New Capacitor.uc18 bus1=p1umv39 phases=3 Kv=12.47 conn=Wye Kvar=450.0

New CapControl.uc18 Capacitor=uc18 Element=Line.padswitch(r:p1umv39-udt11849)u_67928 Terminal=1 delay=100.0 Type=voltage Vmin=120.5 Vmax=125.0 Ptratio=59.99631547328862 Ctratio=100.0

New Capacitor.uc20 bus1=p1umv84 phases=3 Kv=12.47 conn=Wye Kvar=300.0

New CapControl.uc20 Capacitor=uc20 Element=Line.l(r:p1umv84-udt15141) Terminal=1 delay=100.0 Type=voltage Vmin=120.5 Vmax=125.0 Ptratio=59.99631547328862 Ctratio=100.0
