New Capacitor.uc23 bus1=p1umv60 phases=3 Kv=12.47 conn=Wye Kvar=450.0

New CapControl.uc23 Capacitor=uc23 Element=Line.l(r:p1umv60-udt18200) Terminal=1 delay=100.0 Type=voltage Vmin=120.5 Vmax=125.0 Ptratio=59.99631547328862 Ctratio=100.0
