New Storage.storage_sb10_uhs5_1247_node_10_7 phases=3 bus1=sb10_uhs5_1247_node_10_7.1.2.3 kV=12.47 kVA=1100.0 kWRated=1000.0 kWhRated=2000.0 kWhStored=1000.0 State=IDLING %EffCharge=95.0 %EffDischarge=95.0
New Storage.storage_sb10_uhs5_1247_node_10_7_1 phases=3 bus1=sb10_uhs5_1247_node_10_7.1.2.3 kV=12.47 kVA=1100.0 kWRated=1000.0 kWhRated=2000.0 kWhStored=1000.0 State=IDLING %EffCharge=95.0 %EffDischarge=95.0
New Storage.storage_sb10_uhs5_1247_node_10_7_2 phases=3 bus1=sb10_uhs5_1247_node_10_7.1.2.3 kV=12.47 kVA=1100.0 kWRated=1000.0 kWhRated=2000.0 kWhStored=1000.0 State=IDLING %EffCharge=95.0 %EffDischarge=95.0
