New Capacitor.uc28 bus1=udt19478 phases=3 Kv=12.47 conn=Wye Kvar=450.0

New CapControl.uc28 Capacitor=uc28 Element=Line.padswitch(r:udt18829-udt19478)u_69278 Terminal=1 delay=100.0 Type=voltage Vmin=120.5 Vmax=125.0 Ptratio=59.99631547328862 Ctratio=100.0
