New Capacitor.uc34 bus1=p1umv33 phases=3 Kv=12.47 conn=Wye Kvar=300.0

New CapControl.uc34 Capacitor=uc34 Element=Line.padswitch(r:p1umv33-udt8674)u_69676 Terminal=1 delay=100.0 Type=voltage Vmin=120.5 Vmax=125.0 Ptratio=59.99631547328862 Ctratio=100.0
