New Capacitor.uc37 bus1=udt15848 phases=3 Kv=12.47 conn=Wye Kvar=300.0

New CapControl.uc37 Capacitor=uc37 Element=Line.padswitch(r:udt15848-udt16495)u_71178 Terminal=1 delay=100.0 Type=voltage Vmin=120.5 Vmax=125.0 Ptratio=59.99631547328862 Ctratio=100.0
