New Capacitor.uc41 bus1=p1umv12 phases=3 Kv=12.47 conn=Wye Kvar=450.0

New CapControl.uc41 Capacitor=uc41 Element=Line.l(r:p1umv12-udt3714) Terminal=1 delay=100.0 Type=voltage Vmin=120.5 Vmax=125.0 Ptratio=59.99631547328862 Ctratio=100.0
